<?xml version="1.0"?>
<?xml-stylesheet type="text/xsl" href="http://jsbsim.sourceforge.net/JSBSim.xsl"?>

<fdm_config name="737-900" version="2.0" release="ALPHA"
   xmlns:xsi="http://www.w3.org/2001/XMLSchema-instance"
   xsi:noNamespaceSchemaLocation="http://jsbsim.sourceforge.net/JSBSim.xsd">

 <fileheader>
  <author> Aeromatic v 3.3.10 </author>
  <filecreationdate> 24 Apr 2018 </filecreationdate>
  <version>$Revision: 1.80 $</version>
  <description> Models a 737-900. </description>
 </fileheader>

<!--
  File:     737-900.xml
  Inputs:
    name:          737-900
    type:          Multi-engine Passenger Jet Airliner, Transonic Jet Transport
    stall speed:   unspecified
    max weight:    187731.48 lb
    length:        138.12 ft
    wing:
     span:         112.60 ft
     area:         1340.97 sq-ft
     mean chord:   11.92 ft
     aspect ratio: 9.45:1
     taper ratio:  0.16:1
     incidence:    2.00 degrees
     dihedral:     6.00 degrees
     sweep:        25.02 degrees

    no. engines:   2
    engine type:   Turbine Engine
    engine layout: wings

    control type:   Conventional with Yaw Damper

    gear type:     tricycle
    steering type: steering
    retractable?:  yes

  Outputs:
    wing loading:       140.00 lb/sq-ft
     - thickness ratio: 15.00%
    payload:            37217.08 lbs
    CL-alpha:           5.38 per radian
    CL-0:               0.20
    CL-max:             1.20
    CD-0:               0.02
    K:                  0.04
    Mcrit:              0.79

    min. turn radius    -nan ft
    max. turn rate:     -nan deg/s
-->

 <metrics>
   <wingarea  unit="FT2">  1340.97 </wingarea>
   <wingspan  unit="FT" >   112.60 </wingspan>
   <wing_incidence unit="DEG"> 2.00 </wing_incidence>
   <chord     unit="FT" >    11.92 </chord>
   <htailarea unit="FT2">   352.84 </htailarea>
   <htailarm  unit="FT" >    62.33 </htailarm>
   <vtailarea  unit="FT2">  268.19 </vtailarea>
   <vtailarm  unit="FT" >    57.83 </vtailarm>
   <location name="AERORP" unit="IN">
     <x>   909.58 </x>
     <y>     0.00 </y>
     <z>     0.00 </z>
   </location>
   <location name="EYEPOINT" unit="IN">
     <x>   116.02 </x>
     <y>   -30.00 </y>
     <z>    70.00 </z>
   </location>
   <location name="VRP" unit="IN">
     <x>     0.0 </x>
     <y>     0.0 </y>
     <z>     0.0 </z>
   </location>
 </metrics>

 <mass_balance>
   <ixx unit="SLUG*FT2">  606068.00 </ixx>
   <iyy unit="SLUG*FT2">  2107065.75 </iyy>
   <izz unit="SLUG*FT2">  2543410.50 </izz>
   <emptywt unit="LBS" >  98512.78 </emptywt>
   <location name="CG" unit="IN">
     <x>   909.58 </x>
     <y>     0.00 </y>
     <z>   -41.44 </z>
   </location>
   <pointmass name="Payload">
    <description> 37217.08 LBS should bring model up to entered max weight </description>
    <weight unit="LBS"> 18608.54 </weight>
    <location name="POINTMASS" unit="IN">
     <x>   909.58 </x>
     <y>     0.00 </y>
     <z>   -41.44 </z>
   </location>
  </pointmass>
 </mass_balance>

 <propulsion>

   <engine file="CFM56-7-7B26">
    <location unit="IN">
				<x>  715.6 </x> <!-- value from simulator data -->
				<y> -193.68 </y> <!-- value from simulator data -->
				<z>  -52.38 </z> <!-- BWL 155.72 -->
			</location>
			<orient unit="DEG">
				<roll>  0 </roll>
				<pitch> 0 </pitch>
				<yaw>   1 </yaw>
			</orient>
			<feed>3</feed>
			<thruster file="direct">
				<location unit="IN">
					<x>  715.6 </x> <!-- value from simulator data -->
					<y> -193.68 </y> <!-- value from simulator data -->
					<z>  -52.38 </z> <!-- BWL 155.72 -->
				</location>
				<orient unit="DEG">
					<roll>  0 </roll>
					<pitch> 0 </pitch>
					<yaw>   1 </yaw>
				</orient>
			</thruster>
  </engine>

   <engine file="CFM56-7-7B26">
    <location unit="IN">
				<x> 715.6 </x> <!-- value from simulator data -->
				<y> 193.68 </y> <!-- value from simulator data -->
				<z>  -52.38 </z> <!-- BWL 155.72 -->
			</location>
			<orient unit="DEG">
				<roll>  0 </roll>
				<pitch> 0 </pitch>
				<yaw>  -1 </yaw>
			</orient>
			<feed>4</feed>
			<thruster file="direct">
				<location unit="IN">
					<x> 715.6 </x> <!-- value from simulator data -->
					<y> 193.68 </y> <!-- value from simulator data -->
					<z>  -52.38 </z> <!-- BWL 155.72 -->
				</location>
				<orient unit="DEG">
					<roll>  0 </roll>
					<pitch> 0 </pitch>
					<yaw>   -1 </yaw>
				</orient>
			</thruster>
  </engine>

  <tank type="FUEL"><!-- Left wing tank -->
			<location unit="IN">
				<x> 767.01 </x> <!-- based on trimsheet calculation. Correct value -->
				<y> -350 </y>
				<z> 26.58 </z>
			</location>
			<drain_location unit="IN">
				<x> 703.09</x> <!-- based on trimsheet calculation. Correct value -->
				<y> -200 </y>
				<z> 10.91 </z>
			</drain_location>
			<capacity unit="LBS"> 8630 </capacity>
			<contents unit="LBS"> 8630 </contents>
			<temperature> 59.0 </temperature> <!-- Fuel temp in degrees F -->
		</tank>
		<tank type="FUEL"><!-- Right wing tank -->
			<location unit="IN">
				<x> 767.01 </x> <!-- based on trimsheet calculation. Correct value -->
				<y> 350 </y>
				<z> 26.58 </z>
			</location>
			<drain_location unit="IN">
				<x> 703.09</x> <!-- based on trimsheet calculation. Correct value -->
				<y> 200 </y>
				<z> 10.91 </z>
			</drain_location>
			<capacity unit="LBS"> 8630 </capacity>
			<contents unit="LBS"> 8630 </contents>
			<temperature> 59.0 </temperature> <!-- Fuel temp in degrees F -->
		</tank>
		<tank type="FUEL"><!-- Center tank -->
			<location unit="IN">
				<x> 675.41 </x> <!-- based on trimsheet calculation. Correct value -->
				<y>   0 </y>
				<z> -19.54 </z>
			</location>
			<drain_location unit="IN">
				<x> 675.46 </x> <!-- based on trimsheet calculation. Correct value -->
				<y> 0 </y>
				<z> -97.4 </z>
			</drain_location>
			<capacity unit="LBS"> 28803 </capacity>
			<contents unit="LBS">  9000 </contents>
			<temperature> 59.0 </temperature> <!-- Fuel temp in degrees F -->
		</tank>
		<tank type="FUEL"><!-- Feed pipe for left engine -->
			<location unit="IN">
				<x> 700 </x>
				<y>-193 </y>
				<z> -40 </z>
			</location>
			<capacity unit="LBS"> 0.5 </capacity>
			<contents unit="LBS"> 0.25 </contents>
		</tank>
		<tank type="FUEL"><!-- Feed pipe for right engine -->
			<location unit="IN">
				<x> 700 </x>
				<y> 193 </y>
				<z> -40 </z>
			</location>
			<capacity unit="LBS"> 0.5 </capacity>
			<contents unit="LBS"> 0.25 </contents>
		</tank>
	</propulsion>

 <ground_reactions>

  <contact type="BOGEY" name="NOSE">
    <location unit="IN">
      <x>   215.47 </x>
      <y>     0.00 </y>
      <z>  -198.90 </z>
    </location>
    <static_friction>  0.80 </static_friction>
    <dynamic_friction> 0.50 </dynamic_friction>
    <rolling_friction> 0.02 </rolling_friction>
    <spring_coeff  unit="LBS/FT">     56319.45 </spring_coeff>
    <damping_coeff unit="LBS/FT/SEC"> 28159.72 </damping_coeff>
    <max_steer unit="DEG"> 5.00 </max_steer>
    <brake_group> NONE </brake_group>
    <retractable> 1 </retractable>
  </contact>

  <contact type="BOGEY" name="LEFT_MAIN">
    <location unit="IN">
      <x>   945.96 </x>
      <y>  -121.61 </y>
      <z>  -198.90 </z>
    </location>
    <static_friction>  0.80 </static_friction>
    <dynamic_friction> 0.50 </dynamic_friction>
    <rolling_friction> 0.02 </rolling_friction>
    <spring_coeff  unit="LBS/FT">     187731.48 </spring_coeff>
    <damping_coeff unit="LBS/FT/SEC"> 93865.74 </damping_coeff>
    <max_steer unit="DEG">0</max_steer>
    <brake_group> LEFT </brake_group>
    <retractable> 1 </retractable>
  </contact>

  <contact type="BOGEY" name="RIGHT_MAIN">
    <location unit="IN">
      <x>   945.96 </x>
      <y>   121.61 </y>
      <z>  -198.90 </z>
    </location>
    <static_friction>  0.80 </static_friction>
    <dynamic_friction> 0.50 </dynamic_friction>
    <rolling_friction> 0.02 </rolling_friction>
    <spring_coeff  unit="LBS/FT">     187731.48 </spring_coeff>
    <damping_coeff unit="LBS/FT/SEC"> 93865.74 </damping_coeff>
    <max_steer unit="DEG">0</max_steer>
    <brake_group> RIGHT </brake_group>
    <retractable> 1 </retractable>
  </contact>

  <contact type="STRUCTURE" name="LEFT_WING">
    <location unit="IN">
     <x>   909.58 </x>
     <y>  -675.59 </y>
     <z>   -41.44 </z>
    </location>
   <static_friction>  1 </static_friction>
   <dynamic_friction> 1 </dynamic_friction>
   <spring_coeff unit="LBS/FT">      187731.48 </spring_coeff>
   <damping_coeff unit="LBS/FT/SEC"> 187731.48 </damping_coeff>
  </contact>

  <contact type="STRUCTURE" name="RIGHT_WING">
    <location unit="IN">
     <x>   909.58 </x>
     <y>   675.59 </y>
     <z>   -41.44 </z>
    </location>
   <static_friction>  1 </static_friction>
   <dynamic_friction> 1 </dynamic_friction>
   <spring_coeff unit="LBS/FT">      187731.48 </spring_coeff>
   <damping_coeff unit="LBS/FT/SEC"> 187731.48 </damping_coeff>
  </contact>

 </ground_reactions>

 <system file="Propulsion.xml"/>
 <system file="Thrust Reverse.xml"/>
 <system file="Aircraft control.xml"/>
 <system file="Landing Gear.xml"/>
 <system file="Flaps.xml"/>
 <system file="Spoilers.xml"/>
 <system file="Speedbrake.xml"/>

 <flight_control name="FCS: 737-900">

 </flight_control>

 <aerodynamics>

  <axis name="LIFT">

    <!-- Lift above 0.85 and below -0.85 is generalised -->
    <function name="aero/force/Lift_alpha">
      <description>Lift due to alpha</description>
      <product>
          <property>aero/qbar-psf</property>
          <property>metrics/Sw-sqft</property>
          <table>
            <independentVar lookup="row">aero/alpha-rad</independentVar>
            <tableData>
              -1.57  0.0000
              -1.22 -0.5464
              -1.05 -0.7361
              -0.88 -0.8500
              -0.64 -0.4000
              -0.22 -1.0000
               0.00  0.2000
               0.19  1.2000
               0.60  0.6000
               0.88  1.1500
               1.05  0.9959
               1.22  0.7392
               1.57  0.0000
            </tableData>
          </table>
      </product>
    </function>

    <function name="aero/force/Lift_pitch_rate">
        <description>Lift due to pitch rate</description>
        <product>
          <property>aero/qbar-psf</property>
          <property>metrics/Sw-sqft</property>
          <property>velocities/q-aero-rad_sec</property>
          <property>aero/ci2vel</property>
          <value> 11.3493 </value>
        </product>
      </function>

      <function name="aero/force/Lift_alpha_rate">
        <description>Lift due to alpha rate</description>
        <product>
           <property>aero/qbar-psf</property>
           <property>metrics/Sw-sqft</property>
           <property>aero/alphadot-rad_sec</property>
           <property>aero/ci2vel</property>
           <value> 3.9648 </value>
        </product>
      </function>

    <function name="aero/force/Lift_elevator">
       <description>Lift due to Elevator Deflection</description>
       <product>
           <property>aero/qbar-psf</property>
           <property>metrics/Sw-sqft</property>
           <property>fcs/elevator-pos-rad</property>
           <value> 0.7057 </value>
       </product>
    </function>

    <function name="aero/force/Lift_flap">
       <description>Delta Lift due to flaps</description>
       <product>
           <property>aero/qbar-psf</property>
           <property>metrics/Sw-sqft</property>
           <property>fcs/flap-pos-deg</property>
           <value> 0.0435 </value>
       </product>
    </function>


    <function name="aero/force/Lift_spoilers">
       <description>Delta Lift due to spoilers</description>
       <product>
           <property>aero/qbar-psf</property>
           <property>metrics/Sw-sqft</property>
           <property>fcs/spoilers-pos-norm</property>
           <value> -0.1000 </value>
       </product>
    </function>

  </axis>

  <axis name="DRAG">

    <!-- CD0 is based on fuselage, wing, horizontal- en vertical tail -->
    <!-- Antennas, struts and wires are not taken into account        -->
    <!-- CD for gear (fixed and retractable) is defined below         -->
    <function name="aero/force/Drag_minimum">
       <description>Minimum drag</description>
       <product>
          <property>aero/qbar-psf</property>
          <property>metrics/Sw-sqft</property>
          <value> 0.0169 </value>
       </product>
    </function>

    <function name="aero/force/Drag_alpha">
       <description>Drag due to alpha</description>
       <product>
          <property>aero/qbar-psf</property>
          <property>metrics/Sw-sqft</property>
          <table>
            <independentVar lookup="row">aero/alpha-rad</independentVar>
            <tableData>
             -1.57    1.4083
             -0.19    0.0198
              0.00    0.0000
              0.19    0.0198
              1.57    1.4083
            </tableData>
          </table>
       </product>
    </function>

    <function name="aero/force/Drag_induced">
       <description>Induced drag</description>
         <product>
           <property>aero/qbar-psf</property>
           <property>metrics/Sw-sqft</property>
           <property>aero/cl-squared</property>
           <value> 0.0495 </value>
         </product>
    </function>

    <function name="aero/force/Drag_mach">
       <description>Drag due to mach</description>
        <product>
          <property>aero/qbar-psf</property>
          <property>metrics/Sw-sqft</property>
          <table>
            <independentVar lookup="row">velocities/mach</independentVar>
            <tableData>
                0.00    0.0000
                0.79    0.0000
                1.10    0.0230
                1.80    0.0150
            </tableData>
          </table>
        </product>
    </function>

    <function name="aero/force/Drag_beta">
       <description>Drag due to sideslip</description>
       <product>
          <property>aero/qbar-psf</property>
          <property>metrics/Sw-sqft</property>
          <table>
            <independentVar lookup="row">aero/beta-rad</independentVar>
            <tableData>
              -1.57    1.2300
              -0.26    0.0500
               0.00    0.0000
               0.26    0.0500
               1.57    1.2300
            </tableData>
          </table>
       </product>
    </function>

    <function name="aero/force/Drag_elevator">
       <description>Drag due to Elevator Deflection</description>
       <product>
           <property>aero/qbar-psf</property>
           <property>metrics/Sw-sqft</property>
           <abs><property>fcs/elevator-pos-rad</property></abs>
           <value> 0.0400 </value>
       </product>
    </function>

    <function name="aero/force/Drag_gear">
       <description>Drag due to gear</description>
         <product>
           <property>aero/qbar-psf</property>
           <property>metrics/Sw-sqft</property>
           <property>gear/gear-pos-norm</property>
           <value> 0.0150 </value>
         </product>
    </function>

    <function name="aero/force/Drag_flap">
       <description>Drag due to flaps</description>
         <product>
           <property>aero/qbar-psf</property>
           <property>metrics/Sw-sqft</property>
           <property>fcs/flap-pos-deg</property>
           <value> 0.0017 </value>
         </product>
    </function>


    <function name="aero/force/Drag_spoilers">
       <description>Drag due to spoilers</description>
         <product>
           <property>aero/qbar-psf</property>
           <property>metrics/Sw-sqft</property>
           <property>fcs/spoilers-pos-norm</property>
           <value> 0.0169 </value>
         </product>
    </function>

    <function name="aero/force/Drag_speedbrake">
       <description>Drag due to speedbrakes</description>
         <product>
           <property>aero/qbar-psf</property>
           <property>metrics/Sw-sqft</property>
           <property>fcs/speedbrake-pos-norm</property>
           <value> 0.1200 </value>
         </product>
    </function>

  </axis>

  <axis name="SIDE">

    <function name="aero/force/Side_beta">
       <description>Side force due to beta</description>
       <product>
           <property>aero/qbar-psf</property>
           <property>metrics/Sw-sqft</property>
           <property>aero/beta-rad</property>
           <value> -0.9412 </value>
       </product>
    </function>
    <function name="aero/force/Side_roll_rate">
       <description>Side force due to roll rate</description>
       <product>
           <property>aero/qbar-psf</property>
           <property>metrics/Sw-sqft</property>
           <property>aero/bi2vel</property>
           <property>velocities/p-aero-rad_sec</property>
           <value> 0.003740 </value>
       </product>
    </function>

    <function name="aero/force/Side_yaw_rate">
       <description>Side force due to yaw rate</description>
       <product>
           <property>aero/qbar-psf</property>
           <property>metrics/Sw-sqft</property>
           <property>aero/bi2vel</property>
           <property>velocities/r-aero-rad_sec</property>
           <value> 0.9668 </value>
       </product>
    </function>

    <function name="aero/force/Side_rudder">
       <description>Side force due to rudder</description>
       <product>
           <property>aero/qbar-psf</property>
           <property>metrics/Sw-sqft</property>
           <property>fcs/rudder-pos-rad</property>
           <value> 0.2813 </value>
       </product>
    </function>

  </axis>

  <axis name="PITCH">

    <function name="aero/moment/Pitch_alpha">
       <description>Pitch moment due to alpha</description>
       <product>
           <property>aero/qbar-psf</property>
           <property>metrics/Sw-sqft</property>
           <property>metrics/cbarw-ft</property>
           <property>aero/alpha-rad</property>
           <value> -0.6000 </value>
       </product>
    </function>

    <function name="aero/moment/Pitch_elevator">
       <description>Pitch moment due to elevator</description>
       <product>
          <property>aero/qbar-psf</property>
          <property>metrics/Sw-sqft</property>
          <property>metrics/cbarw-ft</property>
          <property>fcs/elevator-pos-rad</property>
          <table>
            <independentVar lookup="row">velocities/mach</independentVar>
            <tableData>
              0.0    -1.2000
              2.0    -0.3000
            </tableData>
          </table>
       </product>
    </function>

    <function name="aero/moment/Pitch_damp">
       <description>Pitch moment due to pitch rate</description>
       <product>
           <property>aero/qbar-psf</property>
           <property>metrics/Sw-sqft</property>
           <property>metrics/cbarw-ft</property>
           <property>aero/ci2vel</property>
           <property>velocities/q-aero-rad_sec</property>
           <value> -17.0000 </value>
       </product>
    </function>

    <function name="aero/moment/Pitch_alphadot">
       <description>Pitch moment due to alpha rate</description>
       <product>
           <property>aero/qbar-psf</property>
           <property>metrics/Sw-sqft</property>
           <property>metrics/cbarw-ft</property>
           <property>aero/ci2vel</property>
           <property>aero/alphadot-rad_sec</property>
           <value> -6.0000 </value>
       </product>
    </function>

  </axis>

  <axis name="ROLL">

    <function name="aero/moment/Roll_beta">
       <description>Roll moment due to beta</description>
       <product>
           <property>aero/qbar-psf</property>
           <property>metrics/Sw-sqft</property>
           <property>metrics/bw-ft</property>
           <property>aero/beta-rad</property>
           <property>fcs/gear-no-wow</property>
           <value> -0.103528 </value>
       </product>
    </function>

    <function name="aero/moment/Roll_damp">
       <description>Roll moment due to roll rate</description>
       <product>
           <property>aero/qbar-psf</property>
           <property>metrics/Sw-sqft</property>
           <property>metrics/bw-ft</property>
           <property>aero/bi2vel</property>
           <property>velocities/p-aero-rad_sec</property>
           <value> -0.2307 </value>
       </product>
    </function>

    <function name="aero/moment/Roll_yaw">
       <description>Roll moment due to yaw rate</description>
       <product>
           <property>aero/qbar-psf</property>
           <property>metrics/Sw-sqft</property>
           <property>metrics/bw-ft</property>
           <property>aero/bi2vel</property>
           <property>velocities/r-aero-rad_sec</property>
           <value> -0.005556 </value>
       </product>
    </function>

    <function name="aero/moment/Roll_aileron">
       <description>Roll moment due to aileron</description>
       <product>
          <property>aero/qbar-psf</property>
          <property>metrics/Sw-sqft</property>
          <property>metrics/bw-ft</property>
          <property>fcs/left-aileron-pos-rad</property>
           <table>
            <independentVar lookup="row">velocities/mach</independentVar>
            <tableData>
              0.0    0.1000
              2.0    0.0250
            </tableData>
          </table>
       </product>
    </function>

    <function name="aero/moment/Roll_rudder">
       <description>Roll moment due to rudder</description>
       <product>
           <property>aero/qbar-psf</property>
           <property>metrics/Sw-sqft</property>
           <property>metrics/bw-ft</property>
           <property>fcs/rudder-pos-rad</property>
           <value> 0.0100 </value>
       </product>
    </function>

    <function name="aero/moment/Roll_spoilers">
       <description>Roll moment due to spoilers</description>
       <product>
          <property>aero/qbar-psf</property>
          <property>metrics/Sw-sqft</property>
          <property>metrics/bw-ft</property>
          <property>fcs/spoilers-pos-norm</property>
          <property>fcs/left-aileron-pos-rad</property>
          <table>
            <independentVar lookup="row">aero/alpha-rad</independentVar>
            <tableData>
             -0.175   0.0000
              0.0     0.2400
              0.175   0.0000
            </tableData>
          </table>
       </product>
    </function>

  </axis>

  <axis name="YAW">

    <function name="aero/moment/Yaw_beta">
       <description>Yaw moment due to beta</description>
       <product>
           <property>aero/qbar-psf</property>
           <property>metrics/Sw-sqft</property>
           <property>metrics/bw-ft</property>
           <property>aero/beta-rad</property>
           <value> 0.232291 </value>
       </product>
    </function>

    <function name="aero/moment/Yaw_roll_rate">
       <description>Yaw moment due to roll rate</description>
       <product>
           <property>aero/qbar-psf</property>
           <property>metrics/Sw-sqft</property>
           <property>metrics/bw-ft</property>
           <property>aero/bi2vel</property>
           <property>velocities/p-rad_sec</property>
           <value> -0.001921 </value>
       </product>
    </function>

    <function name="aero/moment/Yaw_damp">
       <description>Yaw moment due to yaw rate</description>
       <product>
           <property>aero/qbar-psf</property>
           <property>metrics/Sw-sqft</property>
           <property>metrics/bw-ft</property>
           <property>aero/bi2vel</property>
           <property>velocities/r-aero-rad_sec</property>
           <value> -0.244318 </value>
       </product>
    </function>

    <function name="aero/moment/Yaw_rudder">
       <description>Yaw moment due to rudder</description>
       <product>
           <property>aero/qbar-psf</property>
           <property>metrics/Sw-sqft</property>
           <property>metrics/bw-ft</property>
           <property>fcs/rudder-pos-rad</property>
           <value> -0.144488 </value>
       </product>
    </function>

    <function name="aero/moment/Yaw_aileron">
       <description>Adverse yaw</description>
       <product>
           <property>aero/qbar-psf</property>
           <property>metrics/Sw-sqft</property>
           <property>metrics/bw-ft</property>
           <property>fcs/left-aileron-pos-rad</property>
           <value> 0 </value>
       </product>
    </function>

  </axis>

 </aerodynamics>

 <external_reactions>
 </external_reactions>

</fdm_config>
